# Калибровка АЦП
V_in := 4.756  # подаваемое напряжение
V_stm := 4.807  # получаемое напряжения
k := 4.756/4.807 = 0.98939
9.8643465
V_inValve := 9.8643465
V_stmValve := 9.8643465
k_valve := 9.77/9.8643465 = 0.990436
